H := 561400  # Высота рабочей орбиты, м
R := 6371000  # Радиус Земли, м
μ := 3.986*10^14  # Гравитационный параметр Земли, м^3/с^2
R_atm := 100000 + R = 6471000  # Радиус атмосферы, м
Trev := 2*π*sqrt((H + R)^3/μ) = 5744.29  # Период обращения на рабочей орбите, с
Uсм := π  # Угол смещения, рад
Rр := R + H = 6932400  # Радиус рабочей орбиты, м
Vр := sqrt(μ/Rр) = 7582.75  # Скорость движения по рабочей орбите, м/с
n := 1509
j := 0 .. n
Rф[j] := R_atm + (Rр - R_atm - 50000)*j/n  # Радиус орбиты фазирования, м
T_lim[j] := 24*60*60  # Ограничение на время маневра, с
Vф[j] := sqrt(μ/Rф[j])  # Скорость на орбите фазирования, м/с
Vппф[j] := sqrt(μ/Rр)*sqrt(2*Rф[j]/(Rр + Rф[j]))  # Скорость в апогее переходной орбиты, м/с
Vапф[j] := sqrt(μ/Rф[j])*sqrt(2*Rр/(Rр + Rф[j]))  # Скорость в перигее переходной орбиты, м/с
ΔV1[j] := Vр - Vппф[j]  # Затраты характеристической скорости в апогее переходной орбиты, м/с
ΔV4[j] := Vапф[j] - Vф[j]  # Затраты характеристической скорости в перигее переходной орбиты, м/с
Vхрр[j] := 2*ΔV1[j] + 2*ΔV4[j]
# Суммарные затраты характеристической скорости на маневр, м/с
VхΣ[j] := Vхрр[j]
ωр := sqrt(μ/Rр^3) = 0.00109381  # Угловая скорость на рабочей орбите, 1/с
ωф[j] := sqrt(μ/Rф[j]^3)  # Угловая скорость на орбите фазирования, 1/с
t14[j] := π*sqrt((Rф[j] + Rр)^3/(8*μ))  # Время перелета с рабочей орбиты на орбиту фазирования, с
t45[j] := (Uсм + 2*ωр*t14[j] - 2*π)/(ωф[j] - ωр)  # Время фазирования КА, с
tΣ[j] := 2*t14[j] + t45[j]  # Суммарное время маневра, с
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opt :=
    z ← 0
    for j ∈ 1 .. n
        z ← j if (VхΣ[j] ≤ VхΣ[z]) and (tΣ[j] ≤ T_lim[0])
    z
opt = 1125
VхΣ[opt] = 172.082  # Суммарные оптимальные затраты характеристической скорости на маневр, м/с
tΣ[opt] = 86284.7  # Суммарное время маневра, с
